# OpenSim document version 40000
MarkerSet:
  Marker Nose: head (0.116266 0.0126096 0.000152885) fixed=true
  Marker Head: head (0.0159224 0.164131 0) fixed=true
  Marker Neck: torso (-0.04295584 0.413061 -0.00145) fixed=true
  Marker LShoulder: torso (-0.01275162 0.3663071 -0.2015742) fixed=true
  Marker RShoulder: torso (-0.01275162 0.3663071 0.2015742) fixed=true
  Marker LElbow: humerus_l (0.025 -0.2979545 0.008737653) fixed=true
  Marker RElbow: humerus_r (0.025 -0.2979545 -0.008737653) fixed=true
  Marker LWrist: radius_l (-0.0001735891 -0.235096 -0.009743795) fixed=true
  Marker RWrist: radius_r (-0.0001735891 -0.235096 0.009743795) fixed=true
  Marker Hip: pelvis (-0.1562618 0.004088455 0)
  Marker LHip: pelvis (-0.06392744 -0.08134311 -0.1054064) fixed=true
  Marker RHip: pelvis (-0.06392744 -0.08134311 0.1054064) fixed=true
  Marker LKnee: femur_l (-0.005410485 -0.3861322 -0.005110697) fixed=true
  Marker RKnee: femur_r (-0.005410485 -0.3861322 0.005110697) fixed=true
  Marker LAnkle: tibia_l (-0.0002863098 -0.3768398 -0.01495955) fixed=true
  Marker RAnkle: tibia_r (-0.0002863098 -0.3768398 0.01495955) fixed=true
  Marker LBigToe: toes_l (0.0646643 0.009869336 0.01458025) fixed=true
  Marker LSmallToe: toes_l (0.02711665 0.009571644 -0.02878016) fixed=true
  Marker LHeel: calcn_l (0.01358603 0.02330436 0.001886717) fixed=true
  Marker RBigToe: toes_r (0.0646643 0.009869336 -0.01458025) fixed=true
  Marker RSmallToe: toes_r (0.02711665 0.009571644 0.02878016) fixed=true
  Marker RHeel: calcn_r (0.01358603 0.02330436 -0.001886717) fixed=true
  Marker Neck_03: torso (-0.004861665 0.4999582 -0.00145) fixed=true
  Marker Neck_02: torso (-0.01514127 0.4599571 -0.00145) fixed=true
  Marker LClavicle: torso (0.02977836 0.3714094 -0.02513332) fixed=true
  Marker RClavicle: torso (0.02829521 0.3698935 0.02513332) fixed=true
  Marker LLatissimus: torso (-0.07509694 0.2765189 -0.09474243) fixed=true
  Marker RLatissimus: torso (-0.07509694 0.2765189 0.09474243) fixed=true
  Marker Spine_05: torso (-0.07503432 0.3385103 -0.0006262521) fixed=true
  Marker Spine_04: torso (-0.08063872 0.2156442 0.0003484856) fixed=true
  Marker Spine_03: lumbar1 (-0.04424202 -0.00910063 0) fixed=true
  Marker Spine_02: lumbar3 (-0.0476993 -0.004161466 0) fixed=true
  Marker Spine_01: lumbar5 (-0.03686957 0.01439264 0) fixed=true
